finish
/clear
/prep7
!导入hypermesh中制作完成的曲线梁模型
/INPUT,'Project1_Original','cdb','G:\Project1\ANSYS\',, 0
!设置材料属性，准备之后赋予，对应的单元类型在Hypermesh中生成过程中默认为1
finish
/prep7
mp,ex,1,0.0078e9
mp,dens,1,1550
mp,prxy,1,0.24
!选中所有已有单元赋予材料属性
esel,all
EMODIF,all,MAT,1

!施加约束


nsel,all
allsel,all
/NERR,,2000000
/OUTPUT,SET,TXT
finish

/solu
antype,2
modopt,subsp,100
mxpand,00

solve
finish

SET,LIST
ALLSEL,ALL
finish
read_modal.mac
