*********************************************************************
** Abaqus/fromAnsys 6.16-1
**
** reading Ansys data from: G:\Project1\ANSYS_Project2\Project2.cdb
**   creating Abaqus input: G:\Project1\ANSYS_Project2\Project2.inp
**  writing diagnostics to: G:\Project1\ANSYS_Project2\Project2.log
**
** Ansys Commands processed:
**      command   number
** ------------   ------
**         ACEL        1
**       ANTYPE        1
**        CGLOC        1
**      CGOMEGA        1
**      CMBLOCK        1
**            D     2400
**       DCGOMG        1
**       DOMEGA        1
**       EBLOCK        1
**           ET        1
**       MODOPT        1
**       MPTEMP        4
**       MPDATA        4
**       MXPAND        2
**       NBLOCK        1
**        OMEGA        1
**         *SET       11
** Ansys Commands NOT processed:
**      command   number
** ------------   ------
**       ALPHAD        1
**        BETAD        1
**       BFUNIF        1
**         *DIM        1
**       DMPRAT        1
**          DOF        1
**        *ELSE        1
**       *ENDIF        1
**        ERESX        1
**       EXTOPT        3
**       FINISH        1
**          /GO        1
**          *IF        1
**            N        1
**        /NOPR        1
**       NUMOFF        4
**       /PREP7        1
**       SUBOPT        1
**       /TITLE        1
**         TREF        1
**
*HEADING
**
** ---------------------------------------------------
** ---- *NODE ----------------------------------------
** ---------------------------------------------------
**
*SYSTEM
**
*NODE, SYSTEM=R
      1, 0.075000003, 0.075000003, 0
      2, 0.100000001, 0.075000003, 0
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**
** -------------------------------------
** following 8492 elements have elemtype=185 MAT=1 ET=1 REAL=0
*SOLID SECTION, ELSET=ES2_M1_E1_R0, MATERIAL=MATERIAL-1
*Element, type=C3D8, ELSET=ES2_M1_E1_R0
1, 80,645,65,1,2363,2928,2348,2284
2, 645,646,66,65,2928,2929,2349,2348
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**
*NSET, NSET=NS_BOUNDARY_3
2,3,5,7,9,39
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**
** ---------------------------------------------------
** ---- *MATERIAL ------------------------------------
** ---------------------------------------------------
**
*MATERIAL, NAME=MATERIAL-1
*DENSITY
1.55000000e+03,
*ELASTIC
7.80000000e+06, 2.40000000e-01
**
** following 1 *ELSETs are translated from 1 CMBLOCKs
**
*ELSET, ELSET=AUTO1, GENERATE
       1,    8492, 1
**
** ---------------------------------------------------
*STEP, NAME=STEP-1
*FREQUENCY, EIGENSOLVER=LANCZOS
30, , ,
**
** BOUNDARY CONDITIONS
**
*BOUNDARY
NS_BOUNDARY_3,  1,  1, 0
NS_BOUNDARY_3,  2,  2, 0
NS_BOUNDARY_3,  3,  3, 0
**
*END STEP
